OpenVSP model (file version 5), 2 components.
Geometry view with OpenVSP parameter names; values to 6 digits, angles in degrees, lengths in the model's unit.
Overall bounding box: X_Min=0 X_Len=6.3001 Y_Min=-4.76027 Y_Len=9.52054 Z_Min=-0.746667 Z_Len=1.44667

Wing "wing"
  location (X Y Z) 1.638 0 0.165, rotation 0 0 0
  symmetric about XZ
  bounding box size 1.40235 9.52054 0.390856
  totals: TotalSpan=9.5238 TotalProjectedSpan=9.52054 TotalChord=1.4 TotalArea=13.3333 TotalAR=6.79805
  root: chord 1.4, twist -1.5, airfoil file "GOE 398 AIRFOIL"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 BaseThickChord=0.139355 ThickChord=0.18
  sections:
    n  Span    Root_Chord  Tip_Chord  Area     Sweep  Sweep_Location  Dihedral  Twist  Twist_Location  tip airfoil
    1  1.5873  1.4         1.4        2.22222  0      0               1.5       -1.5   0               as above
    2  1.5873  1.4         1.4        2.22222  0      0               1.5       -1.5   0               as above
    3  1.5873  1.4         1.4        2.22222  0      0               1.5       -1.5   0               as above

TransportFuse "TransportFuse"
  location (X Y Z) 0 0 0, rotation 0 0 0
  bounding box size 6.3001 1.4 1.44667
  Design: AftCenter=0.3 AftHeight=0.3 AftMult=3 AftWidth=0.1 Diameter=1.4 Length=6.3 NoseCenter=-0.2 NoseMult=1.5
  custom script TransportFuse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
