OpenVSP model (file version 5), 3 components.
Geometry view with OpenVSP parameter names; values to 6 digits, angles in degrees, lengths in the model's unit.
Overall bounding box: X_Min=0 X_Len=74.47 Y_Min=-26.3537 Y_Len=52.7074 Z_Min=-3.01218 Z_Len=14.0622

Wing "wing"
  location (X Y Z) 26.19 0 -2.15, rotation 0 0 0
  symmetric about XZ
  bounding box size 18.9208 52.7074 4.73325
  totals: TotalSpan=54 TotalProjectedSpan=52.7074 TotalChord=6.53167 TotalArea=423.863 TotalAR=6.55416
  root: chord 14.5, twist 3, NACA 4-series Camber=0.02 CamberLoc=0.4 ThickChord=0.12
  sections:
    n  Span   Root_Chord  Tip_Chord  Area     Sweep  Sweep_Location  Dihedral  Twist  Twist_Location  tip airfoil
    1  9.33   14.5        9.35       111.26   32     0               6.2       1      0               as above
    2  16.28  9.35        2.74       98.4126  32     0               6.2       -3     0               as above
    3  1.39   2.74        0.51       2.25875  60     0               50        0      0               as above
  SS_Control "flap": UStart=0.25788 UEnd=0.51757 Length_C_Start=0.25 Length_C_End=0.25 Length_Start=3.25207 Length_End=1.36539 LE_Flag=0 Surf_Type=2

Wing "horizontal"
  location (X Y Z) 64.67 0 1.5, rotation 0 0 0
  symmetric about XZ
  bounding box size 9.09309 22.9598 1.61657
  totals: TotalSpan=23.08 TotalProjectedSpan=22.9598 TotalChord=4.14 TotalArea=95.5512 TotalAR=5.51696
  root: chord 5.85, twist 0, NACA 4-series Camber=0.02 CamberLoc=0.4 ThickChord=0.12
  sections:
    n  Span   Root_Chord  Tip_Chord  Area     Sweep  Sweep_Location  Dihedral  Twist  Twist_Location  tip airfoil
    1  11.54  5.85        2.43       47.7756  30     0               5.85      0      0               as above
  SS_Control "elevator": UStart=0.33333 UEnd=0.66667 Length_C_Start=0.25 Length_C_End=0.25 Length_Start=1.4625 Length_End=0.6075 LE_Flag=0 Surf_Type=2

Wing "vertical"
  location (X Y Z) 60 0 0, rotation 90 0 0
  bounding box size 14.47 1.04941 11.05
  totals: TotalSpan=11.05 TotalProjectedSpan=11.05 TotalChord=6.955 TotalArea=76.8528 TotalAR=1.58879
  root: chord 10.49, twist 0, NACA 4-series Camber=0 CamberLoc=0.2 ThickChord=0.1
  sections:
    n  Span   Root_Chord  Tip_Chord  Area     Sweep  Sweep_Location  Dihedral  Twist  Twist_Location  tip airfoil
    1  11.05  10.49       3.42       76.8528  45     0               0         0      0               as above
  SS_Control "rudder": UStart=0.33333 UEnd=0.66667 Length_C_Start=0.25 Length_C_End=0.25 Length_Start=2.6225 Length_End=0.855 LE_Flag=0 Surf_Type=2
