OpenVSP model (file version 5), 5 components.
Geometry view with OpenVSP parameter names; values to 6 digits, angles in degrees, lengths in the model's unit.
Overall bounding box: X_Min=0 X_Len=22.735 Y_Min=-12.2828 Y_Len=24.5656 Z_Min=0 Z_Len=5.79

Wing "wing"
  location (X Y Z) 8.9 0 1.5, rotation 0 0 0
  symmetric about XZ
  bounding box size 2.57566 24.5656 0.675663
  totals: TotalSpan=24.58 TotalProjectedSpan=24.5656 TotalChord=2.29 TotalArea=54.7258 TotalAR=11.0272
  root: chord 2.57, twist 3, NACA 5-digit CamberLoc=0.15 IdealCl=0.6 ThickChord=0.18
  sections:
    n  Span  Root_Chord  Tip_Chord  Area     Sweep  Sweep_Location  Dihedral  Twist  Twist_Location  tip airfoil
    1  4.75  2.57        2.57       12.2075  0      0               0         3      0               as above
    2  7.54  2.57        1.45       15.1554  5.27   0               2.5       1.5    0               NACA 5-digit CamberLoc=0.15 IdealCl=0.6 ThickChord=0.13

Wing "horizontal"
  location (X Y Z) 20.29 0 4.5, rotation 0 0 0
  symmetric about XZ
  bounding box size 1.99 7.32 0.238908
  totals: TotalSpan=7.32 TotalProjectedSpan=7.32 TotalChord=1.605 TotalArea=11.7486 TotalAR=4.56075
  root: chord 1.99, twist 0, NACA 4-series Camber=0 CamberLoc=0.2 ThickChord=0.12
  sections:
    n  Span  Root_Chord  Tip_Chord  Area    Sweep  Sweep_Location  Dihedral  Twist  Twist_Location  tip airfoil
    1  3.66  1.99        1.22       5.8743  6.3    0               0         0      0.25            as above

Wing "vertical"
  location (X Y Z) 11.71 0 1.32, rotation 90 0 0
  bounding box size 11.025 0.961373 4.47
  totals: TotalSpan=4.47 TotalProjectedSpan=4.47 TotalChord=4.38625 TotalArea=17.4589 TotalAR=1.14446
  root: chord 9.61, twist 0, NACA 4-series Camber=0 CamberLoc=0.2 ThickChord=0.1
  sections:
    n  Span  Root_Chord  Tip_Chord  Area     Sweep  Sweep_Location  Dihedral  Twist  Twist_Location  tip airfoil
    1  0.96  9.61        4.97       6.9984   79.09  0               0         0      0               as above
    2  0.39  4.97        4.06       1.76085  69.16  0               0         0      0               as above
    3  1.3   4.06        2.66       4.368    54     0               0         0      0               as above
    4  1.82  2.66        2.1        4.3316   31.85  0               0         0      0.25            as above

Pod "PodGeom"
  location (X Y Z) 8.14 -4.05 1.42, rotation 0 0 0
  bounding box size 4.4 0.88 0.88
  Design: FineRatio=10 Length=4.4

Pod "PodGeom"
  location (X Y Z) 8.14 4.05 1.42, rotation 0 0 0
  bounding box size 4.4 0.88 0.88
  Design: FineRatio=10 Length=4.4
